// MONITORES PQ TRANSFORMADORES CARGAS ESPECIAIS

New monitor.45PONTE_PQ element=transformer.45PONTE terminal=1 mode=1 ppolar=no

New monitor.75VE1_PQ element=transformer.75VE1 terminal=1 mode=1 ppolar=no

New monitor.75VE2_PQ element=transformer.75VE2 terminal=1 mode=1 ppolar=no

New monitor.45IRRIGA_PQ element=transformer.45IRRIGA terminal=1 mode=1 ppolar=no

New monitor.30POCO1_PQ element=transformer.30POCO1 terminal=1 mode=1 ppolar=no

New monitor.45POCO2_PQ element=transformer.45POCO2 terminal=1 mode=1 ppolar=no

New monitor.45PIVO_PQ element=transformer.45PIVO terminal=1 mode=1 ppolar=no

New monitor.1125ANTENA_PQ element=transformer.1125ANTENA terminal=1 mode=1 ppolar=no
